# AguaClara Water Treatment Plants
# Automated Design
# Add variable descriptions next to every varible so it is easy to interpret what this all means.
# Design References
# [reference: BasicInputs3Sed1Bay.xmcd]
# Use BasicClientInputs and ExpertClientInputs when this is run by LabVIEW.
# Use BasicInputs and ExpertInputs to use the program in MathCAD
# Change the reference by
# - right clicking
# - select properties
# - reference tab
# - type in the correct file name
# [reference: ExpertInputs.xmcd]
# [reference: DesignAssumptions.xmcd]
# [reference: MathFunctions.xmcd]
# [reference: PipeDatabase.xmcd]
# [reference: MinorLossCoefficients.xmcd]
# [reference: FluidsFunctions.xmcd]
# [reference: Sedimentation Tank.xmcd]
# [reference: Floc Hopper - New Design.xmcd]
# [reference: FCM.xmcd]
# [reference: Flocculator 3.xmcd]
# [reference: RapidMixer.xmcd]
# [reference: EntranceTankDim.xmcd]
# [reference: Materials List.xmcd]
Q_Plant = 20 L/s
N_SedTanks = 3
W_ExitChannelMin = 0.114 m
W_SedBay = 0.92 m
N_SedBays = 1
# Sed Tanks and Slopes:
B_SedPort = 3.91009 cm  # Height of the narrowest part of the manifold ports
N_SedTanks = 3
W_SedPort = 3.91009 cm
H_SedBetween = 0 cm  # Distance from the top of the inlet manifold to the bottom of the ledge supporting the lamella frame
A_SedPort = 15.2888 cm^2  # Port Area
L_Sed = 8.9441 m
W_SedSludgeFlat = 5 cm  # Distance between tips of manifold plates (space alloted for the drain holes
N_SedBays = 1  # Number of bays of inlet manifolds in each sed tank
AN_SedTopInlet = 60 deg  # Angle of the top of the inlet manifold
L_SedPort = 4.51498 cm  # Length of the port through which water exits the inlet manifold
AN_SedBottom = 10 deg  # Angle of the bottom of inlet manifold
W_SedSlopePlate = 30 cm  # Width of ferrous cement plates in whice one manifold port is cut
Q_SedBay = 6.66667 L/s
W_SedBayActual = 0.92 m
L_SedSlopeManifold = 0.800718 m  # This is the extra distance between the last slope and the wall
# Sedimentation Tank Sludge Drain:
N_SedSludgeOrifices = 59  # per cell
Ti_SludgeDrain = 30 min  # Tank Drain time
W_SedSludge = 17.6016 cm  # Width of the sludge channel
B_SedSludgeOrifices = 15 cm  # Distance center to center between drain orifices
H_SedSludge = 8.80081 cm  # Depth of the sludge channel
T_SedSludge = 7.4641 cm
T_SedSludge = 7.4641 cm
# Thickness of the plate topping the sludge channel
# through which drain holes are formed
W_SedDrainCover = 19.2376 cm
D_SedSludgeOrifice = 0.015 m  # Diameter of drain orifices
W_SedInletBottom = 0.363812 m
N_SedSludgeOrifices = 59
ND_SedSludgeValve = 3 in
# Sedimentation Tank Dimensions:
Z_SedSludge = 0.162649 m  # Height from 0 of the top of the sludge drain
H_SedBottomSlope = 0.0691517 m  # Height of the bottom slope
H_SedTopSlope = 0.693442 m  # Height of the top of the inlet manifold
Z_SedSlopes = 0.856091 m  # Height from 0 of the top of the inlet manifold
W_Sed = 0.92 m  # Total tank wall height
L_Sed = 8.9441 m  # Total tank length
# Inlet Channel:
HW_InletChannel = 0.361054 m  # Width of the drop chimneys connecting channel to sed inlet manifolds
W_InletChannel = 0.48775 m  # length of drop chimmneys
L_Channel = 3.36 m
W_SedManifoldEntrance = 0.2632 m
L_SedManifoldEntrance = 0.211412 m
H_SedManifoldPort = 0.280543 m  # Ports at bottom of inlet chimney are set to be triangles
W_SedManifoldPort = 0.298759 m
N_SedInletPipes = 2  # per sed bay
H_InletChannel = 0.461054 m
# Sedimentation Tank Effluent Launder:
N_SedLaunderOrifices = 156  # Number of orifices per launder
Q_SedLaunderOrifices = 2.13675e-5 m^3/s  # More Launder Dimensions
ND_SedLaunder = 6 in
B_SedLaunderOrifices = 0.1 m  # Center to center launder spacing
L_SedLaunder = 7.90861 m
# Exit Channel:
D_SedLaunderOrifice = 0.275591 in
W_ExitChannel = 0.397742 m
H_ExitChannel = 0.461054 m
L_ExitChannel = 3.36 m
H_PltWeir = 0.253917 m  # height of the weir carrying water to the distribution tank
HW_ExitChannel = 0.321054 m  # water height in exit channel from 0
# Lamella:
L_SedPlate = 0.36576 m
B_SedPlate = 2.13891 cm  # center to center distance between lamella
S_SedPlate = 1.7 cm  # spacing between lamella
N_SedPlates = 308  # Number of Sed Plates per Sedimentation Tank Bay.
AN_SedPlate = 60 deg
ZW_ExitChannel = 1.50764 m
V_SedC = 9.3241 m/day
L_SedActive = 6.50878 m
T
V_SedUp = 70 m/day
Z_SedLaunder = 1.42351 m
H_SedPlate = 0.316757 m
H_SedAbove = 0.208275 m  # Height of water needed above the lamella
N_SedPlates = 308
HW_Sed = 1.54764 m
H_Sed = 1.64764 m
Z_Mp = 1.18659 m
N_SedPorts = 28
H_SedBayDivider = 0.926091 m
W_SedSlopePlateRemaining = 0.544099 m
W_SedBayDivider = 0.15 m
# Sedimentation Tank Floc Hopper:
A_FlocHopper =  # error: This variable is undefined.
L_FlocHopper = 0.92 m  # Length of the hopper cement plate
L_FlocHopperOffset = 0.18288 m  # distance from the edge of the channel to the bottom of the first lamella (collection distance)
W_FlocHopper = 0.05 m  # width of the hopper set within each bay
# Flow Controller:
N_Fcm = 3
ID_FcmTube = 3.175 mm
ID_FcmTube = 0.125 in
L_FcmTube = 94.1094 cm
Q_FcmTubeMax = 300 mL/min
HL_FcmValve = 16.721 cm
# Flocculator: | Look at Flocculator Positioning arrays
W_FlocChannel = 0.492661 m
# Fill last channel with bafffles from last channel
# Fix port width to be based on energy dissipation in that channel
ED_Floc = [20; 2] mW/kg
# Adjust spacing after the number of baffles per channel is known.
# Check the residence time of the flocculator should be at least 20minutes
HW_FlocEnd = 1.54764 m
X_FlocBaffles =  # error
L_FlocBaffles = [
    1.32341, 1.28817, 1.02614, 1.46512;
    1.79982, 1.76459, 1.50255, 0.988704;
    1.32341, 1.28817, 1.02614, 1.46512;
    1.79982, 1.76459, 1.50255, 0.988704;
    1.32341, 1.28817, 1.02614, 1.46512;
    1.79982, 1.76459, 1.50255, 0.988704;
    1.32341, 1.28817, 1.02614, 1.46512;
    1.79982, 1.76459, 1.50255, 0.988704;
    1.32341, 1.28817, 1.02614, 1.46512;
    1.79982, 1.76459, 1.50255, 0.988704
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] m
Z_FlocBaffles = [
    0, 0, 0, 0.55894;
    0.224238, 0.25947, 0.521506, 0;
    0, 0, 0, 0.55894;
    0.224238, 0.25947, 0.521506, 0;
    0, 0, 0, 0.55894;
    0.224238, 0.25947, 0.521506, 0;
    0, 0, 0, 0.55894;
    0.224238, 0.25947, 0.521506, 0;
    0, 0, 0, 0.55894;
    0.224238, 0.25947, 0.521506, 0
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] m
N_FlocChannels = 4
L_FlocTank = 35.7764 m
HL_Floc = 37.6411 cm
HW_FlocStart = 1.92406 m
S_FlocBaffle = [22.4238; 25.947; 52.1506; 55.894] cm
B_FlocBaffle = [26.4238; 29.947; 56.1506; 59.894] cm
N_FlocChannelBaffles = [33; 29; 15; 14]
W_FlocPort = [0.174238; 0.20947; 0.471506; 0.50894] m
HL_FlocChannels = [18.4587; 12.4801; 3.58318; 3.11919] cm
L_FlocBaffleLower = [1.32341; 1.28817; 1.02614; 0.988704] m
L_FlocBaffleUpper = [1.79982; 1.76459; 1.50255; 1.46512] m
H_FlocPort = [0.634037; 0.610259; 0.544905; 0.541062] m
Ti_Floc = 22.7319 min  # residence time of the flocculator
N_FlocBaffles = 91
# Rapid Mix Unit and Entrance Tank:
L_Et = 1.57117 m
W_Et = 1.57117 m
H_Et = 2.32406 m  # Height of Entrance Tank Orifice
W_EtOrifice[30] = 0.031 m
L_trueET[30] = 0.517056 m  # Length of Entrance Tank Orifice
Pi_EtFlow[30] = 0.278388  # Ratio of the minimum flow divided by the maximum flow through the plant.
L_FlocEntryOrifice = 49.2661 cm  # Length of orifice entering into flocculator from Rapid Mix Unit
W_FlocEntryOrifice = 4.77695 cm  # Height of orifice entering into flocculator
ED_Diffusion =  # error  # Minimum Energy Dissipation needed
HL_FlocEntryOrifice = 5.49526 cm  # Head loss caused by entering flocculation tank.
A_FlocEntry = 0.0235342 m^2
A_EtOrifice = 160.287 cm^2
HW_EtTotal =  # error  # Total Height of water at beginning of rapid mix unit
HW_Channel2 =  # error  # Height of water at the back of the entrance tank channel (from channel bottom)
HW_EtChannel = 6.06206 cm  # Height of Waterfall into flocculator
W_EtChannel = 22.4238 cm  # Widt of entrance tank channel
Vol_Stock = 1620 L  # Volume of chemical stock tanks
ZW_ExitChannel = 1.50764 m  # Water Level at the end of the plant in the exit channel and exit channel box
HW_Sed = 1.54764 m
HW_FlocStart = 1.92406 m  # Water level at the beginning of the floc tank
HL_Floc = 37.6411 cm  # just for ref. the head loss throught the floc tank
HW_EtTotal =  # error  # Height of the water in the entrance channel
# Materials List:
L_LaunderPipe =  # error
N_Launders = 6
L_LaunderPipeTotal = 47.4516 m
N_Valves = 3
N_LaunderCouplings = 6
N_ValveCouplings = 3
N_SedPlatesTotal = 924
N_SedPlatesPerSheet = 10
N_SedPlateSheets = 93
N_PipeSedPlateStand =  # error
A_SedTank = 31.0602 m^2
# [reference: AutoCADMasterProgram.xmcd]
# AutoCAD References
AC_SedTank = [
    "_-view o t"; "-layer m tank"; "c t 132,132,132"; "tank"; "  "; "_-view o t _zoom w 0.16,-0.16,0 -9.1041,1.08,1.64764 _box 0,0,0 -8.9441,0.92,1.64764 _box 0.15,-0.15,-0.15 -9.0941,1.07,1.64764 _subtract 0.15,-0.15,-0.15  0,0,0 "; "-layer s 0"; "  "; "-layer f tank"; "  "
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]
AC_EntranceTank = [
    "-layer m entrancetank";
    "c t 214,214,214";
    "entrancetank";
    "  ";
    "_-view o t _zoom w 0.16,5.62065,0 -1.73117,7.51181,2.32406 _box 0,5.78065,0 -1.57117,7.35181,2.32406 _box 0.15,5.63065,-0.15 -1.72117,7.50181,2.32406 _subtract 0.15,5.63065,-0.15  0,5.78065,0 ";
    "-layer s 0";
    "  ";
    "-layer f entrancetank";
    "  ";
    "-layer s entrancetank";
    "  ";
    "_box -1.57117,5.63065,2.27406 -1.34693,5.78065,2.32406";
    "-layer s 0";
    "  ";
    "-layer t entrancetank";
    "  ";
    "_-view o t";
    "_subtract 0.15,5.78065,0  -1.57117,5.63065,2.27406 ";
    "-layer f entrancetank";
    "  "
]
AC_FlocTank =  # error
